// SBML level 2 version 3

model organelle_transport()

  // Compartments:
  compartment CYT = 1;
  compartment O1M in CYT = 0.01;  // 2-D
  compartment O1V in O1M = 0.133;
  compartment O2M in CYT = 0.01;  // 2-D
  compartment O2V in O2M = 0.0335;

  // Species:
  species CYT_A in CYT = 1200; CYT_A is "@CYT::A()";
  species O1V_B in O1V = 1000; O1V_B is "@O1V::B()";
  species O1M_T1 in O1M = 700; O1M_T1 is "@O1M::T1()";
  species O2M_T2 in O2M = 700; O2M_T2 is "@O2M::T2()";
  species O1M_AT1 in O1M = 0; O1M_AT1 is "@O1M::AT1()";
  species O1V_A in O1V = 0; O1V_A is "@O1V::A()";
  species O1V_C in O1V = 0; O1V_C is "@O1V::C()";
  species O1M_CT1 in O1M = 0; O1M_CT1 is "@O1M::CT1()";
  species CYT_C in CYT = 0; CYT_C is "@CYT::C()";
  species O2M_CT2 in O2M = 0; O2M_CT2 is "@O2M::CT2()";
  species O2V_D in O2V = 0; O2V_D is "@O2V::D()";

  // Parameters:
  NA_um3 = 6.02e8;
  d = 0.01;
  vol_CYT = 1;
  vol_O1V = 0.133;
  vol_O2V = 0.0335;
  km_AT1 = 10;
  k_AT1trans = 100000;
  km_CT1 = 10;
  k_CT1trans = 100000;
  km_CT2 = 10;
  k_DT2trans = 100000;
  vol_O1M = 1*d;
  vol_O2M = 1*d;
  kp_AB = 1e9/NA_um3;
  kp_AT1 = 3e8/NA_um3;
  kp_CT1 = 3e8/NA_um3;
  kp_CT2 = 3e8/NA_um3;

  // Assignment rules:
  A := CYT_A + O1V_A;
  B := 0 + O1V_B;
  C := O1V_C + CYT_C;
  D := 0 + O2V_D;

  // Reactions:
  R1: CYT_A + O1M_T1 => O1M_AT1; kp_AT1*CYT_A*O1M_T1;
  R2: O1M_AT1 => CYT_A + O1M_T1; km_AT1*O1M_AT1;
  R3: O1M_AT1 => O1M_T1 + O1V_A; k_AT1trans*O1M_AT1;
  R4: O1V_B + O1V_A => O1V_C; kp_AB*O1V_B*O1V_A;
  R5: O1M_T1 + O1V_C => O1M_CT1; kp_CT1*O1M_T1*O1V_C;
  R6: O1M_CT1 => O1M_T1 + O1V_C; km_CT1*O1M_CT1;
  R7: O1M_CT1 => O1M_T1 + CYT_C; k_CT1trans*O1M_CT1;
  R8: O2M_T2 + CYT_C => O2M_CT2; kp_CT2*O2M_T2*CYT_C;
  R9: O2M_CT2 => O2M_T2 + CYT_C; km_CT2*O2M_CT2;
  R10: O2M_CT2 => O2M_T2 + O2V_D; k_DT2trans*O2M_CT2;
end
