// SBML level 2 version 3

model ab_basic()

  // Compartments:
  compartment cell = 1;

  // Species:
  species A_S_0_b in cell = 100; A_S_0_b is "A(S~0,b)";
  species B_a in cell = 100; B_a is "B(a)";
  species A_S_0_b_1_B_a_1 in cell = 0; A_S_0_b_1_B_a_1 is "A(S~0,b!1).B(a!1)";
  species A_S_P_b in cell = 0; A_S_P_b is "A(S~P,b)";
  species A_S_P_b_1_B_a_1 in cell = 0; A_S_P_b_1_B_a_1 is "A(S~P,b!1).B(a!1)";

  // Parameters:
  k_1 = 1;
  k_p = 10;
  k_dp = 1;

  // Assignment rules:
  A_free := A_S_0_b + A_S_P_b;
  A_bnd := A_S_0_b_1_B_a_1 + A_S_P_b_1_B_a_1;
  A_dp := A_S_0_b + A_S_0_b_1_B_a_1;
  A_p := A_S_P_b + A_S_P_b_1_B_a_1;

  // Reactions:
  R1: A_S_0_b + B_a => A_S_0_b_1_B_a_1; k_1*A_S_0_b*B_a;
  R2: A_S_0_b => A_S_P_b; k_p*A_S_0_b;
  R3: B_a + A_S_P_b => A_S_P_b_1_B_a_1; k_1*B_a*A_S_P_b;
  R4: A_S_0_b_1_B_a_1 => A_S_P_b_1_B_a_1; k_p*A_S_0_b_1_B_a_1;
  R5: A_S_P_b => A_S_0_b; k_dp*A_S_P_b;
  R6: A_S_P_b_1_B_a_1 => A_S_0_b_1_B_a_1; k_dp*A_S_P_b_1_B_a_1;
end
